import Sofa
import Sofa.Core
import os
import math
import json
import numpy
from python.readFoldFormat  import readFold
from Sofa.constants import *
path = os.path.dirname(os.path.abspath(__file__))+'/mesh/'

# Units: mm, kg, s.     Pressure in kPa = k (kg/(m.s^2)) = k (g/(mm.s^2) =  kg/(mm.s^2)

class cornersController(Sofa.Core.Controller):
    def __init__(self, *a, **kw):
        Sofa.Core.Controller.__init__(self, *a, **kw)
        self.node = kw["node"]
        self.theta = 0.0
        return

    def onKeypressedEvent(self, e):
        print("toto")
        if e["key"] == Sofa.constants.Key.plus:
            self.theta = self.theta + 0.05
            with self.node.corners.position.writeable() as positions:
                positions[0][0] = -90*math.cos(self.theta)
                positions[0][1] = -90*math.sin(self.theta)
                positions[3][0] = -90*math.cos(self.theta)
                positions[3][1] = -90*math.sin(self.theta)
        if e["key"] == Sofa.constants.Key.minus:
            with self.node.corners.position.writeable() as positions:
                positions[0][2] = positions[0][2] - 0.5
                positions[1][2] = positions[1][2] - 0.5
                positions[2][2] = positions[2][2] + 0.5
                positions[3][2] = positions[3][2] + 0.5
        return

class pushDownController(Sofa.Core.Controller):
    def __init__(self, *a, **kw):
        Sofa.Core.Controller.__init__(self, *a, **kw)
        self.node = kw["node"]
        self.topMiddle = [0,0,0]
        with self.node.top.position.writeable() as positions:
            for i in range(11):
                self.topMiddle[0] = self.topMiddle[0] + positions[i][0]/11
                self.topMiddle[1] = self.topMiddle[1] + positions[i][1]/11
                self.topMiddle[2] = self.topMiddle[2] + positions[i][2]/11

        return

    def onKeypressedEvent(self, e):
        print("toto")
        if e["key"] == Sofa.constants.Key.downarrow:
            with self.node.top.position.writeable() as positions:
                for i in range(11):
                    positions[i][2] = positions[i][2] - 0.5
        if e["key"] == Sofa.constants.Key.uparrow:
            with self.node.top.position.writeable() as positions:
                for i in range(11):
                    positions[i][2] = positions[i][2] + 0.5
        if e["key"] == Sofa.constants.Key.space:
            with self.node.top.position.writeable() as positions:
                for i in range(11):
                    positions[i][0] = positions[i][0] + ( self.topMiddle[0] - positions[i][0] )*0.05
                    positions[i][1] = positions[i][1] + ( self.topMiddle[1] - positions[i][1] )*0.05
                    positions[i][2] = positions[i][2] + ( self.topMiddle[2] - positions[i][2] )*0.05
        return


def createScene(rootNode):

                rootNode.addObject('RequiredPlugin', pluginName='SofaOrigami')
                rootNode.addObject('RequiredPlugin', pluginName='SofaDeformable')
                rootNode.addObject('RequiredPlugin', pluginName='SofaImplicitOdeSolver')
                rootNode.addObject('RequiredPlugin', pluginName='SofaMiscFem')
                rootNode.addObject('RequiredPlugin', pluginName='SofaOpenglVisual')
                rootNode.addObject('RequiredPlugin', pluginName='SofaPython3')
                #rootNode.addObject('BackgroundSetting')
                rootNode.dt=0.001
                rootNode.gravity=[0 , 0 ,-9810]
                #rootNode.gravity=[0 , -9810, 0]
                rootNode.addObject('VisualStyle', displayFlags='showVisualModels showBehaviorModels hideCollisionModels hideBoundingCollisionModels showForceFields showInteractionForceFields hideWireframe')

                #read fold file
                origamiEdges, triangles,edges,edgesAss, positions = readFold('waterbomb _ 0PercentFolded.fold')
                waterbombPos = [89.9584, 0.461094, 37.4234, 89.9198, 0.286988, 37.399, 89.8375, 0.296582, -14.1482, 89.8865, 0.468541, -14.1239, 89.5802, 0.481473, 19.8898, 89.5686, 0.430547, 19.8883, 89.5751, 0.491235, 3.33795, 89.5615, 0.441323, 3.33643, 89.5797, 0.497282, 2.43315, 89.5657, 0.449303, 2.42456,
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  11.6099]
                model = rootNode.addChild('model')
                model.addObject('EulerImplicitSolver',rayleighStiffness=0.01, rayleighMass=0.01)
                model.addObject('SparseLDLSolver')
                model.addObject('TriangleSetTopologyContainer', name='topo', position=waterbombPos,edges=edges, triangles=triangles)
                model.addObject('MechanicalObject',name="MO", src='@topo', template='Vec3d')
                model.addObject('MeshSpringForceField', name="Springs", trianglesStiffness="500", trianglesDamping="0", drawSpringSize=0)
                model.addObject('TriangleFEMForceField', template='Vec3d', name='FEM', method='large', poissonRatio='0.4',  youngModulus='1900')
                model.addObject('RotationalSpringForceField', template='Vec3d', name='FEM', method='large', edgesAssignment=edgesAss, angleTarget = 0.45, poissonRatio='0.49',  kcrease=100)
                model.addObject('UniformMass', totalMass=0.5)
                model.addObject('RestShapeSpringsForceField', stiffness=500,external_rest_shape="@../actuators/top", points=[0,13,23,27,31,35,37,41,45,49,53],drawSpring=False)
                model.addObject('RestShapeSpringsForceField',name="base", stiffness=500, points=[3,12,22,26,30,34,36,40,44,48,52], drawSpring=False)
                model.addObject('StiffSpringForceField', stiffness=500,object1="@MO",object2="@MO",  indices1=[0,3,4,6,8,10, 90,124 ],    indices2=[1,2,5,7,9,11, 111,145 ],lengths= [0]*8, drawMode = 0, showArrowSize=0.0, damping=0)
                visu = model.addChild('bidon')
                visu.addObject('TriangleSetTopologyContainer', name='topo', position=positions, triangles=triangles)
                visu.addObject('OglModel',src='@topo',template="Vec3d", color='1 1 1 0.7')
                visu.addObject('IdentityMapping')

                actuators = rootNode.addChild('actuators')

                #actuators.addObject('MechanicalObject',name="corners", position=[[-92.225, 0.0, 53.1636],[89.8483, 0.0, 52.9701],[89.7604, 0.0, -29.7904],[-92.3129, 0.0, -29.5968]], template='Vec3d')
                actuators.addObject('MechanicalObject',name="top", position=[[89.9584, 0.461094, 37.4234],[92.8806, 4.79744, 37.3989],[103.362, -10.0974, 37.2636],[98.3024, -11.0142, 37.2934],[93.5284, -9.09611, 37.3363],[90.4543, -4.91211, 37.3898],[107.13, -6.5939, 37.2484],[108.381, -1.60096, 37.251],[106.71, 3.26654, 37.2706],[102.681, 6.46367, 37.3026],[97.5657, 7.02875, 37.3454]], template='Vec3d')
                actuators.addObject(pushDownController(name="MyAmazingController", node=actuators))
                #actuators.addObject(cornersController(name="MyAmazingController", node=actuators))

                return rootNode
